*Heading
** FinEleMethod Q4 plane-stress cantilever-beam benchmark
** Length=10, height=1, thickness=1, E=1000, nu=0.25, end load=-1
*Node
1, 0.0, -0.50
2, 0.5, -0.50
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*Material, name=BeamMaterial
*Elastic
1000.0, 0.25
*Element, type=CPS4, elset=Beam
1, 1, 2, 23, 22
2, 2, 3, 24, 23
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*Solid Section, elset=Beam, material=BeamMaterial
1.0
*Nset, nset=Fixed
1, 22, 43, 64, 85
*Boundary
Fixed, 1, 2, 0.0
*Cload
21, 2, -0.083333333333
42, 2, -0.333333333333
63, 2, -0.166666666667
84, 2, -0.333333333333
105, 2, -0.083333333333
