*Heading
** FinEleMethod Q4 plane-stress uniaxial-tension verification model
** Consistent units: length, force, stress
*Node
1, 0.0, 0.0
2, 1.0, 0.0
3, 1.0, 1.0
4, 0.0, 1.0
*Material, name=TestMaterial
*Elastic
1000.0, 0.25
*Element, type=CPS4, elset=Plate
1, 1, 2, 3, 4
*Solid Section, elset=Plate, material=TestMaterial
1.0
*Boundary
1, 1, 2, 0.0
4, 1, 1, 0.0
*Cload
2, 1, 5.0
3, 1, 5.0
